Tmeandr := 147.7*10^-6  # Измеренный период меандра, с
Fck := 1/Tmeandr*16 = 108328  # Истинная частота тактирования, Гц
Tcorr := 1/(64*Tmeandr) - 1 = 104.789  # Корректировочная константа
rTcorr := round(Tcorr, 0) = 105  # Округление до ближайшего целого
rTcorr = 105  # Перевод в 16-ричную систему
